Simulations: Version=213
  DataStore
  Memo
    This set of examples has one simulation and three experiments where factorial simulations are presented. Each simulation has examples of managers and report components to tailor the analysis and outputs to user's needs.

    **AgPastureExample**

    This is an example of a simple rotation that is cut/grazed, fertilised and irrigated according to the managers provided.
    >*CutRotation* is the manager used to set the cut/grazing regime. It allows to set up cuts at fixed days interval or according to a target amount of DM and also to set the type of DM being targeted (residual or to be removed - DM produced).

    >*FertiliseFixedDates* gives options to apply fertiliser on determined dates, which can be year specific or not, use soil mineral N to prevent applications over a determined value of N at a certain depth and to provide details about the fertiliser application.

    >*AutomaticIrrigation* allows the user to turn irrigation on or off. Once on, irrigation will occur during a determined period, with a determined amount allocated for the period chosen, and will start and end depending on PAWC values set by the user. The user also has the option to set the minimum amount of days that it takes for an irrigation event to happen again, the maximum amount of water that can be applied at each event and the depth to which PAWC is calculated.

    >*ReportExample and Report* components show options on how to tailor the outputs as it best suits the user needs. More details are given in the components.

    **RenewPastureExample**

    This example shows how to kill, cultivate and sow a new pasture. It includes an example of how to change cultivar characteristics.
  Simulation AgPastureExample
    Clock: Start=1980-07-01; End=1985-06-30
    Weather: FileName=%root%/Examples/WeatherFiles/NZ_Lincoln
    MicroClimate: a_interception=0; b_interception=1; c_interception=0; d_interception=0; SoilHeatFluxFraction=0.4; MinimumHeightDiffForNewLayer=0; NightInterceptionFraction=0.5; ReferenceHeight=2
    SoilArbitrator
    Forages
      Parameters:
        Name                          LiveDigestibility  DeadDigestibility  LiveFractionConsumable  DeadFractionConsumable  LiveMinimumBiomass  DeadMinimumBiomass
        SurfaceOrganicMatter.Residue  0.7                0.3                0                       0                       0                   0
        AGPRyegrass.Leaf              FromModel          FromModel          1                       1                       25                  0
        AGPRyegrass.Stem              FromModel          FromModel          1                       1                       10                  0
        AGPRyegrass.Stolon            FromModel          FromModel          1                       1                       0                   0
        AGPWhiteClover.Leaf           FromModel          FromModel          1                       1                       15                  0
        AGPWhiteClover.Stem           FromModel          FromModel          1                       1                       5                   0
        AGPWhiteClover.Stolon         FromModel          FromModel          1                       1                       5                   0
    Summary
    Zone Field: Area=1; Slope=0; AspectAngle=0; Altitude=50
      SimpleGrazing: GrazingRotationType=0; SimpleGrazingFrequencyString=21; SimpleMinGrazable=0; SimpleGrazingResidual=1500; FlexibleGrazePostDM=0; IsCutAndCarry=false; FractionClippingsReturned=0; FractionIntakeNToAnimal=[0]; DungNConc=2.6; FractionOfDungUrineOffPaddock=[0.3]; DepthUrineIsAdded=250; ShowAdvancedExcretaOptions=false; SendDungElsewhere=0; SendUrineElsewhere=0; UsePatching=false; PseudoPatches=true; ZoneCount=25; UrineReturnPattern=2; PseudoRandomSeed=666; MaxEffectiveNConcentration=3.5; FractionPopulationDecline=0; TramplingOn=false; MaximumPropLitterMovedToSoil=0.1; PastureConsumedAtMaximumRateOfLitterRemoval=1200
        PreGrazeDMArray=[1000, 1000, 1000, 1000, 1000, 1000, 1000, 1000, 1000, 1000, 1000, 1000]
        PostGrazeDMArray=[2000, 2000, 2000, 2000, 2000, 2000, 2000, 2000, 2000, 2000, 2000, 2000]
      Manager FertiliseFixedDates
        EachYear = True
        Dates = 5-jan, 5-feb, 5-mar, 5-apr, 5-aug, 5-sep, 5-oct, 5-nov, 5-dec
        UseCritNThreshold = False
        CritNThreshold = 50
        CritNDepth = 75
        Depth = 50
        Amount = 15
        FertiliserType = UreaN
```csharp
using APSIM.Core;
using System;
using Models.Core;
using Models.Soils.Nutrients;
using Models.Soils;
using Models.PMF;
using APSIM.Shared.Utilities;
using System.Linq;
using Models.Interfaces;

namespace Models
{
    [Serializable]
    public class Script : Model, IStructureDependency
    {
        [Link] private Clock clock;
        [Link] private Fertiliser fertiliser;
        [Link] private ISummary summary;
        [Link] private Soil soil;
        private Nutrient nutrient;
        private Nutrient soilN;
        [Link]
        private IPhysical soilPhysical;
        [Link]
        private Nutrient Nutrient;
        [Link(Path="[SurfaceOrganicMatter].SurfaceResidue.Decomposition")]
        private OrganicFlow ResidueDecomposition;
        public IStructure Structure { private get; set; }
        
        


        [Separator("Fertiliser will be applied on the date(s) below")]
        [Description("Apply fertiliser on the same day(s) each year? If no, then must include the year of application below")]
        public bool EachYear { get; set; }

        [Description("Dates for one or more fertiliser applications (dd-mmm or dd-mmm-yyyy) as a list with a comma between dates")]
        public string[] Dates { get; set; }

        [Separator("Test for the mineral N in the soil and don't apply the fertiliser if greater than X kgN/ha is stored in the soil above a depth of Y mm")]
        [Description("Use a critical soil mineral N to prevent application above a threshold?")]
        public bool UseCritNThreshold { get; set; }

        [Description("Don't add fertiliser if N in the soil to the depth below exceeds (kg/ha)")]
        public double CritNThreshold { get; set; }

        [Description("Depth to which the amount of N in the soil should be calculated (mm)")]
        public double CritNDepth { get; set; }

        [Separator("Fertiliser application details")]
        [Description("Depth at which to apply the fertiliser (mm)")]
        public double Depth { get; set; }

        [Description("Amount of fertiliser to apply (kg N /ha) per application")]
        public double Amount { get; set; }

        [Description("Fertiliser type - select from the list")]
        [Display(Type = DisplayType.FertiliserType)]public string FertiliserType { get; set; }


        [EventSubscribe("StartOfSimulation")]
        private void FindSoilNOrNutrient(object sender, EventArgs e)
        {
            nutrient =  Structure.Find<Nutrient>() as Nutrient;
            soilN =  Structure.Find<Nutrient>() as Nutrient;

            if (nutrient == null && soilN == null)
                throw new Exception(string.Format("Error in script {0}: Unable to find nutrient or soilN.", Name));
        }

        [EventSubscribe("DoManagement")]
        private void OnDoManagement(object sender, EventArgs e)
        {
            if (OnApplicationDate())
            {
                if (NContentBelowThreshold())
                    fertiliser.Apply(Amount, FertiliserType, Depth);
                else
                    summary.WriteMessage(this, "Skipping fertiliser application due to soil mineral N content being above critical threshold.", MessageType.Diagnostic);
            }
        }

        /// <summary>Checks if today's date is one of the specified fertiliser application dates.</summary>
        private bool OnApplicationDate()
        {
            if (EachYear)
                return Dates.Any(d => DateUtilities.DatesEqual(d, clock.Today));
            
            DateTime[] dates = Dates.Select(d => DateTime.ParseExact(d, "d-MMM-yyyy", null)).ToArray();
            return dates.Any(d => SameDate(d, clock.Today));
        }

        /// <summary>Checks if N content in soil is below critical threshold.</summary>
        private bool NContentBelowThreshold()
        {
            if (!UseCritNThreshold)
                return true;
            
            double[] weights = GetLayerWeights();
            double cumSoilN = 0;

            for (int i = 0; i < soilPhysical.Thickness.Length; i++)
            {
                if (nutrient != null)
                    cumSoilN += weights[i] * nutrient.MineralN[i];
                else if (soilN != null)
                    cumSoilN += weights[i] * soilN.MineralN[i];
            }

            return cumSoilN <= CritNThreshold;
        }

        private double[] GetLayerWeights()
        {
            double[] weights = new double[soilPhysical.Thickness.Length];
            double cumDepth = 0;

            for (int i = 0; i < soilPhysical.Thickness.Length; i++)
            {
                cumDepth += soilPhysical.Thickness[i];
                if (cumDepth < CritNDepth)
                    weights[i] = 1;
                else if (cumDepth - soilPhysical.Thickness[i] <= CritNDepth)
                    weights[i] = (CritNDepth - (cumDepth - soilPhysical.Thickness[i])) / soilPhysical.Thickness[i];
                else
                    weights[i] = 0;
            }

            return weights;
        }

        private bool SameDate(DateTime d1, DateTime d2)
        {
            return d1.Year == d2.Year && d1.DayOfYear == d2.DayOfYear;
        }
    }
}
```
      Manager AutomaticIrrigation
        allowIrrigation = True
        seasonStart = 1-sep
        seasonEnd = 30-apr
        seasonsAllocation = 10000
        triggerDeficit = 75
        targetDeficit = 95
        returndays = 3
        maximumAmount = 30
        depthPAWC = 300
```csharp
using Newtonsoft.Json;
using APSIM.Shared.Utilities;
using System.Xml.Serialization;
using Models.Soils;
using Models.PMF;
using Models.Core;
using System;
using System.Linq;
using Models.Interfaces;


        
namespace Models
{
    [Serializable] 
    [System.Xml.Serialization.XmlInclude(typeof(Model))]
    public class Script : Model
    {
        [Link] private ISummary summary;
        [Link] private Irrigation Irrigation;
        [Link] private Clock Clock;
        [Link] private Soil Soil;
        [Link(IsOptional = true)] private IPlant existingCrop;
        private DateTime StartDate;
        private DateTime EndDate;
        private double TopDUL;
        private double TopLL;
        private int nLayers;
        [Link]
        private IPhysical soilPhysical;
        [Link]
        private ISoilWater waterBalance;
        //Communication to other modules
       
        //User inputs from properties tab
        [Description("Turn irrigation on?")]
        public bool allowIrrigation { get; set; }
        [Description("Start of irrigation season (dd-MMM)")]
        public string seasonStart { get; set; }
        [Description("End of irrigation season (dd-MMM)")]
        public string seasonEnd { get; set; }
        [Description("Season allocation (mm)")]
        public double seasonsAllocation { get; set; }
        [Description("Deficit to trigger irrigation (% PAWC)")]
        public double triggerDeficit { get; set; }
        [Description("Deficit to stop irrigaton (% PAWC)")]
        public double targetDeficit { get; set; }
        [Description("Minimum days for irrigation to return")]
        public double returndays { get; set; }
        [Description("Maximum irrigation application (mm/day)")]
        public double maximumAmount { get; set; }
        [Description("Depth to calculate PAWC (mm)")]
        public double depthPAWC { get; set; }

        //Class members
        [JsonIgnore] public double TopSWdeficit { get; set; }
        [JsonIgnore] public double TopSWC { get; set; }
        [JsonIgnore] public double DaysSinceIrrigation { get; set; }
        [JsonIgnore] public double AmountToApply { get; set; }
        [JsonIgnore] public double SeasonAppliedAmount { get; set; }
        
        private bool IrrigationIsAllowed { get; set; }
        private bool SeasonIsOpen { get; set; }
        private bool CropIsActive { get; set; }
        private bool IrrigatorIsAvailable { get; set; }
        private bool SoilIsDry { get; set; }

    
        //Calculate static soil variables
        [EventSubscribe("StartOfSimulation")]
        private void OnStartOfSimulation(object sender, EventArgs e)
        {   
            //Set the season dates
            StartDate = DateTime.Parse(seasonStart + "-" + Clock.Today.Year.ToString());
            EndDate = DateTime.Parse(seasonEnd + "-" + Clock.Today.Year.ToString());
            
            //Can we irrigate at all?
            IrrigationIsAllowed = false; 
            if (allowIrrigation)
                IrrigationIsAllowed = true; 

            //Calculate soil water variables
            double depthFromSurface = 0.0;
            double fracLayer = 0.0;
            nLayers = soilPhysical.Thickness.Length;
            for (int layer = 0; layer < nLayers; layer++)
            {
                fracLayer = Math.Min(1.0, (depthPAWC - depthFromSurface) / soilPhysical.Thickness[layer]);
                TopLL += soilPhysical.LL15mm[layer] * fracLayer;
                TopDUL += soilPhysical.DULmm[layer] * fracLayer;
                depthFromSurface += soilPhysical.Thickness[layer];
                if (depthFromSurface >= depthPAWC)
                    layer = nLayers;
            }
        }
             
        //Determine daily requirement for irrigation
        [EventSubscribe("StartOfDay")]
        private void OnStartOfDay(object sender, EventArgs e)
        {
            //Can we irrigate today?          
            SeasonIsOpen = isBetween(Clock.Today, StartDate, EndDate);
            if (!SeasonIsOpen)
                SeasonAppliedAmount = 0;

            //Is there a crop in the ground that needs irrigation?
            CropIsActive = false;
            if ((existingCrop != null) && (existingCrop.IsAlive))
                CropIsActive = true;
            //if ((existingCrop.Phenology.Stage >= 3.0) && (existingCrop.Phenology.Stage < 6.0))
          
            //Is the irrigator available?
            IrrigatorIsAvailable = false;
            DaysSinceIrrigation += 1;
            if (DaysSinceIrrigation >= returndays)
                IrrigatorIsAvailable = true;
          
            //Is the soil dry enough to require irrigation?
            SoilIsDry = false;
            double depthFromSurface = 0.0;
            double fracLayer = 0.0;
            TopSWC = 0.0;
            for (int layer = 0; layer < nLayers; layer++)
            //for (int layer = 0; depthFromSurface < depthPAWC + soilPhysical.Thickness[layer]; layer++)
            {
                fracLayer = Math.Min(1.0, (depthPAWC - depthFromSurface) / soilPhysical.Thickness[layer]);
                TopSWC += waterBalance.SWmm[layer] * fracLayer;
                depthFromSurface += soilPhysical.Thickness[layer];
                if (depthFromSurface >= depthPAWC)
                    layer = nLayers;
            }
            
            TopSWdeficit = TopSWC - TopDUL;
            if (Math.Max(0.0, -TopSWdeficit) >= (TopDUL - TopLL) * (100 - triggerDeficit) / 100)
                SoilIsDry = true;
                
            //Are all the conditions ratifying irrigation
            if (IrrigationIsAllowed && SeasonIsOpen && CropIsActive && IrrigatorIsAvailable && SoilIsDry)
            {
                //Lets bloody well irrigate then!!!!
                AmountToApply = TopDUL * targetDeficit / 100 - TopSWC;
                AmountToApply = Math.Max(0.0, Math.Min(AmountToApply, seasonsAllocation - SeasonAppliedAmount));
                Irrigation.Apply(AmountToApply);
                DaysSinceIrrigation = 0;
                SeasonAppliedAmount += AmountToApply;
            }
        }
        
        ///Checks whether theDate is between iniDate and endDate (non-year specific)
        private bool isBetween(DateTime theDay, DateTime iniDate, DateTime endDate)
        {
            bool result = false;
            if (iniDate.DayOfYear < endDate.DayOfYear)
            {
                // period is within one year, ex: summer in the northern hemisphere
                if ((theDay.DayOfYear >= iniDate.DayOfYear) && (theDay.DayOfYear <= endDate.DayOfYear))
                    result = true;
            }
            else
            {
                // period goes over the end of the year, ex: summer in the southern hemisphere
                if ((theDay.DayOfYear >= iniDate.DayOfYear) || (theDay.DayOfYear <= endDate.DayOfYear))
                    result = true;
            }
            
            return result;
        }
    }
}
```
      Irrigation
      Fertiliser
      SurfaceOrganicMatter: InitialResidueName=Sward; InitialResidueType=grass; InitialResidueMass=1000; InitialStandingFraction=0; InitialCPR=0; InitialCNR=15
      Soil: SoilType=NZ_Sedimentary; LocalName=Lismore; Site=Winchmore; NearestTown=Ashburton; Region=Canterbury; Country=New Zealand; Latitude=-48.48; Longitude=0
        Chemical: PHUnits=Water
          Thickness  PH  CEC
          150        6   13.966
          150        6   8.24825
          200        6   6.6176
          150        6   5.1934
          250        6   4.3688
          300        6   3.90025
          300        6   3.78775
          CEC source: Calculated
        Physical
          Thickness  ParticleSizeSand  ParticleSizeSilt  ParticleSizeClay  Rocks     BD    AirDry  LL15   DUL    SAT   KS
          150        28                52                20                0         1.3   0.05    0.15   0.36   0.45  5000
          150        29.75             55.25             15                0         1.35  0.12    0.14   0.34   0.43  2500
          200        30.8              57.2              12                0.568263  1     0.055   0.055  0.19   0.25  3000
          150        32.2              59.8              8                 0.798387  0.53  0.015   0.015  0.065  0.15  10000
          250        32.9              61.1              6                 0.866051  0.31  0.01    0.01   0.04   0.11  17500
          300        33.25             61.75             5                 0.866621  0.3   0.01    0.01   0.03   0.11  20000
          300        33.25             61.75             5                 0.866621  0.3   0.01    0.01   0.03   0.11  20000
          Rocks, ParticleSizeSand, ParticleSizeSilt source: Calculated
          SoilCrop AGPRyegrassSoil: LL=[0.15, 0.14, 0.06, 0.02, 0.01, 0.01, 0.01]; KL=[0.1, 0.1, 0.08, 0.04, 0.01, 0, 0]; XF=[1, 1, 1, 1, 1, 0, 0]
          SoilCrop AGPWhiteCloverSoil: LL=[0.15, 0.14, 0.06, 0.02, 0.01, 0.01, 0.01]; KL=[0.1, 0.1, 0.08, 0.04, 0.01, 0, 0]; XF=[1, 1, 1, 1, 1, 0, 0]
        WaterBalance SoilWater: SummerDate=1-Nov; SummerU=6; SummerCona=3.5; WinterDate=1-apr; WinterU=2; WinterCona=2; DiffusConst=88; DiffusSlope=35; Salb=0.13; CN2Bare=73; CNRed=20; CNCov=0.8; DischargeWidth=0; CatchmentArea=0; PSIDul=-100
          Thickness  SWCON  KLAT
          150        0.5    0
          150        0.52   0
          200        0.55   0
          150        0.6    0
          250        0.65   0
          300        0.65   0
          300        0.65   0
        Organic: FOMCNRatio=40; CarbonUnits=Total
          Thickness  Carbon  SoilCNRatio  FBiom  FInert  FOM
          150        3       12           0.04   0.5     331.337
          150        1       12           0.02   0.7     245.461
          200        0.6     12           0.02   0.83    164.537
          150        0.4     12           0.01   0.9     121.892
          250        0.25    12           0.01   0.95    73.9313
          300        0.15    12           0      0.99    40.5743
          300        0.1     12           0      0.99    22.2677
        Water: Thickness=[150, 150, 200, 150, 250, 300, 300]; InitialValues=[0.3495, 0.33, 0.18325, 0.0625, 0.0385, 0.029, 0.029]; FilledFromTop=false
        Nutrient
        Solute NO3: Thickness=[150, 150, 200, 150, 250, 300, 300]; InitialValues=[5, 2.5, 1, 0.75, 0.5, 0.5, 0.5]; InitialValuesUnits=ppm; WaterTableConcentration=0; D0=0; DepthConstant=0; MaxDepthSoluteAccessible=0; RunoffEffectivenessAtMovingSolute=0; MaxEffectiveRunoff=0
        Solute NH4: Thickness=[150, 150, 200, 150, 250, 300, 300]; InitialValues=[0.1, 0.1, 0.1, 0.1, 0.1, 0.1, 0.1]; InitialValuesUnits=ppm; WaterTableConcentration=0; D0=0; DepthConstant=0; MaxDepthSoluteAccessible=0; RunoffEffectivenessAtMovingSolute=0; MaxEffectiveRunoff=0
        Solute Urea: Thickness=[150, 150, 200, 150, 250, 300, 300]; InitialValues=[0, 0, 0, 0, 0, 0, 0]; InitialValuesUnits=kg/ha; WaterTableConcentration=0; D0=0; DepthConstant=0; MaxDepthSoluteAccessible=0; RunoffEffectivenessAtMovingSolute=0; MaxEffectiveRunoff=0
        SoilTemperature Temperature: InteractionsPerDay=8
      PastureSpecies AGPRyegrass: doyGermination=275; daysEmergenceToAnthesis=120; daysAnthesisToMaturity=85; degreesDayForAnthesis=1100; degreesDayForMaturity=900; daysAnnualsFactor=45; CanopyType=PastureSpecies; InitialShootDM=1500; InitialRootDM=450; InitialRootDepth=750; initialDMFractionsGrasses=[0.15, 0.25, 0.25, 0.05, 0.05, 0.1, 0.1, 0.05, 0, 0, 0]; initialDMFractionsForbs=[0.2, 0.2, 0.15, 0.05, 0.1, 0.15, 0.1, 0.05, 0, 0, 0]; PhotosyntheticEfficiency=0.01; PhotosynthesisCurveFactor=0.8; FractionPAR=0.5; ReferenceCO2=380; CO2EffectScaleFactor=700; CO2EffectOffsetFactor=600; CO2EffectMinimum=0.7; CO2EffectExponent=2; ReproSeasonDurationCoeff=2; ReproSeasonShouldersLengthFactor=1; ReproSeasonOnsetDurationFactor=0.6; RelativeTurnoverEmerging=2; DetachmentDroughtCoefficient=3; DetachmentDroughtEffectMin=0.1; TurnoverStockFactor=0.01; TurnoverDefoliationEffectMin=0.025; MinimumGreenLeafProp=0.8; MinimumGreenRootProp=0.5
        initialDMFractionsLegumes=[0.16, 0.23, 0.22, 0.05, 0.03, 0.05, 0.05, 0.01, 0.04, 0.08, 0.08]
        LinearInterpolationFunction FVPDFunction
      PastureSpecies AGPWhiteClover: doyGermination=275; daysEmergenceToAnthesis=120; daysAnthesisToMaturity=85; degreesDayForAnthesis=1100; degreesDayForMaturity=900; daysAnnualsFactor=45; CanopyType=PastureSpecies; InitialShootDM=500; InitialRootDM=150; InitialRootDepth=350; initialDMFractionsGrasses=[0.15, 0.25, 0.25, 0.05, 0.05, 0.1, 0.1, 0.05, 0, 0, 0]; initialDMFractionsForbs=[0.2, 0.2, 0.15, 0.05, 0.1, 0.15, 0.1, 0.05, 0, 0, 0]; PhotosyntheticEfficiency=0.01; PhotosynthesisCurveFactor=0.8; FractionPAR=0.5; ReferenceCO2=380; CO2EffectScaleFactor=700; CO2EffectOffsetFactor=600; CO2EffectMinimum=0.7; CO2EffectExponent=2; ReproSeasonDurationCoeff=2; ReproSeasonShouldersLengthFactor=1; ReproSeasonOnsetDurationFactor=0.6; RelativeTurnoverEmerging=2; DetachmentDroughtCoefficient=3; DetachmentDroughtEffectMin=0.1; TurnoverStockFactor=0.01; TurnoverDefoliationEffectMin=0.025; MinimumGreenLeafProp=0.8; MinimumGreenRootProp=0.5
        initialDMFractionsLegumes=[0.16, 0.23, 0.22, 0.05, 0.03, 0.05, 0.05, 0.01, 0.04, 0.08, 0.08]
        LinearInterpolationFunction FVPDFunction
      Report ReportExample: EventNames=[Clock].EndOfDay
        VariableNames:
          [Clock].Today as Date
          // These examples are set up for Ryegrass and WhiteClover so add in any other species as needed for your simulation
          // The format of AggregationType (variable) from [Report].DayAfterLastOutput to [Clock].Today is used so that when the reporting frequency is changed the outputs are still sensible
          // If the name of the Report component ("ReportExample") here is changed in the simulation tree then all the references to that name in the outputs below also need to be changed
          // If all you want is harvested pasture or net herbage growth and/or standing biomass ....
          Sum of ([AGPRyegrass].HarvestedWt + [AGPWhiteClover].HarvestedWt) from [ReportExample].DayAfterLastOutput to [Clock].Today as HarvestedWt   //the amount harvested (kg DM /ha)
          Sum of ([AGPRyegrass].NetGrowthWt + [AGPWhiteClover].NetGrowthWt) from [ReportExample].DayAfterLastOutput to [Clock].Today as NetGrowthWt   //the amount harvested (kg DM /ha)
          Mean of ([AGPRyegrass].AboveGroundWt + [AGPWhiteClover].AboveGroundWt) from [ReportExample].DayAfterLastOutput to [Clock].Today as StandingBiomass   //pasture biomass (could also be reported as Last rather than Mean) (kg DM /ha)
          // outputs that are used more frequently than others
          Sum of ([AGPRyegrass].WaterDemand + [AGPWhiteClover].WaterDemand) from [ReportExample].DayAfterLastOutput to [Clock].Today as WaterDemand   //how much soil water the pasture could use (mm)
          Sum of (sum([AGPRyegrass].WaterUptake) + Sum([AGPWhiteClover].WaterUptake)) from [ReportExample].DayAfterLastOutput to [Clock].Today as WaterUptake    //the amount of water actuially taken up from the soil (mm)
          Sum of ([AGPRyegrass].SoilDemandN + [AGPWhiteClover].SoilDemandN) from [ReportExample].DayAfterLastOutput to [Clock].Today as NDemand                   //N demand (kg N /ha)
          Sum of ([AGPRyegrass].SoilUptakeN + [AGPWhiteClover].SoilUptakeN) from [ReportExample].DayAfterLastOutput to [Clock].Today as NitrogenUptake       //N uptake from the soil (kg N /ha)
          Sum of [AGPWhiteClover].FixedN from [ReportExample].DayAfterLastOutput to [Clock].Today as NitrogenFixed       //N uptake from the soil (kg N /ha)
          Mean of ([AGPRyegrass].AboveGroundWt + [AGPWhiteClover].AboveGroundWt) from [ReportExample].DayAfterLastOutput to [Clock].Today as HerbageMass
          Mean of ([AGPRyegrass].LAIGreen + [AGPWhiteClover].LAIGreen) from [ReportExample].DayAfterLastOutput to [Clock].Today as LAIGreen
          Mean of ([AGPRyegrass].LAIDead + [AGPWhiteClover].LAIDead + [AGPRyegrass].LAIGreen + [AGPWhiteClover].LAIGreen) from [ReportExample].DayAfterLastOutput to [Clock].Today as LAITotal
          // outputs that indicate what conditions are limiting growth - each growth-limiting factor is 0 (full stress) to 1 (no stress) but there are two components and the values are added so 2 indicates no stress
          Mean of ([AGPRyegrass].GlfTemperature + [AGPWhiteClover].GlfTemperature) from [ReportExample].DayAfterLastOutput to [Clock].Today as GlfTemp       //stress from non-optimal temperature
          Mean of ([AGPRyegrass].GlfWaterSupply + [AGPWhiteClover].GlfWaterSupply) from [ReportExample].DayAfterLastOutput to [Clock].Today as GlfWater       //stress from water limitation
          Mean of ([AGPRyegrass].GlfNSupply + [AGPWhiteClover].GlfNSupply) from [ReportExample].DayAfterLastOutput to [Clock].Today as GlfNitrogen       //stress from N limitation
          // photsynthesis-related outputs - all these are in units of C not DM
          Sum of ([AGPRyegrass].GPP +[AGPWhiteClover].GPP) from [ReportExample].DayAfterLastOutput to [Clock].Today as GrossPrimaryProduction       //GPP (kg C /ha)
          Sum of ([AGPRyegrass].NPP +[AGPWhiteClover].NPP) from [ReportExample].DayAfterLastOutput to [Clock].Today as NettPrimaryProduction        //NPP (kg C /ha)
      Report: EventNames=[Clock].EndOfDay
        VariableNames:
          [Clock].Today as Date
          Sum of ([AGPRyegrass].HarvestedWt + [AGPWhiteClover].HarvestedWt) from 1-Jul to [Clock].Today as HarvestedWt   //the amount harvested (kg DM /ha)
  Simulation RenewPastureExample
    Memo
      This example shows the sequence of killing a pasture, cultivation and then resowing. It also shows how to define a custom cultivar using an example of ryegrass cultivars with different leaf angles (Erect and Prostrate) as examples.

      Two methods are shown. In October, Operations is used to manage the sequence. In November, the RenewPasture Manager script is used.
    Clock: Start=1980-09-28; End=1980-11-30
    Weather: FileName=%root%/Examples/WeatherFiles/NZ_Lincoln.met
    MicroClimate: a_interception=0; b_interception=1; c_interception=0; d_interception=0; SoilHeatFluxFraction=0.4; MinimumHeightDiffForNewLayer=0; NightInterceptionFraction=0.5; ReferenceHeight=2
    SoilArbitrator
    Forages: same as AgPastureExample.Forages
    Summary
    Zone Field: Area=1; Slope=0; AspectAngle=0; Altitude=50
      Manager RenewPasture
        Date2Kill = 5-Nov-1980
        TheSpecies2Kill = AGPRyegrass, AGPWhiteClover
        DateCultivation1 = 8-Nov-1980
        FracResidues1 = 0.7
        CultivationDepth1 = 20
        DateCultivation2 = 15-Nov-1980
        FracResidues2 = 0.5
        CultivationDepth2 = 10
        DateResow = 17-Nov-1980
        TheSpecies2Sow = AGPRyegrass, AGPWhiteClover
        TheCultivars2Sow = Prostrate, AGPWhiteClover
```csharp
using APSIM.Shared.Utilities;
using Models.Utilities;
using Models.Soils;
using Models.PMF;
using Models.Core;
using System;
using System.Linq;
using System.Collections.Generic;
using Models.Surface;

namespace Models
{
    [Serializable] 
    public class Script : Model
    {
        
        [Link] Clock clock;
        [Link] private IPlant[] plants;
        [Link] SurfaceOrganicMatter surfaceOrganicMatter;

        [Separator("Ending the pasture phase")]

        [Description("Date to kill the pasture")]
        public string Date2Kill { get; set; }

        [Description("Species to kill/end in the pasture. Comma delimited, case matters, can be blank")]
        public string[] TheSpecies2Kill { get; set; }        


        [Separator("First cultivation of the field")]

        [Description("Date for first cultivation")]
        public string DateCultivation1 { get; set; }

        [Description("Fraction of residues to incorporate")]
        public double FracResidues1 { get; set; }

        [Description("Depth of cultivation (mm)")]
        public double CultivationDepth1 { get; set; }


        [Separator("Second cultivation of the field")]

        [Description("Date for second cultivation")]
        public string DateCultivation2 { get; set; }

        [Description("Fraction of residues to incorporate")]
        public double FracResidues2 { get; set; }

        [Description("Depth of cultivation (mm)")]
        public double CultivationDepth2 { get; set; }


        [Separator("Resowing of pasture")]

        [Description("Days from second cultivation to resowing")]
        public string DateResow { get; set; }

        [Description("Species to resow. Comma delimited, case matters")]
        public string[] TheSpecies2Sow { get; set; }        

        [Description("Cultivars to resow. Comma delimited, case matters. Use the species name for the default cultivar")]
        public string[] TheCultivars2Sow { get; set; }        

        [EventSubscribe("StartOfSimulation")]
        private void OnStartOfSimulation(object sender, EventArgs e)
        {
        }

        [EventSubscribe("DoManagement")]
        private void OnDoManagement(object sender, EventArgs e)
        {
			// kill the pasture
            if (DateUtilities.WithinDates(Date2Kill, clock.Today, Date2Kill))
				foreach (var plant in plants)
              		if (TheSpecies2Kill != null && TheSpecies2Kill.Length > 0 && TheSpecies2Kill.Contains(plant.Name))
                		plant.EndCrop();

			// first cultivation
            if (DateUtilities.WithinDates(DateCultivation1, clock.Today, DateCultivation1))
				surfaceOrganicMatter.Incorporate(FracResidues1, CultivationDepth1);

			// second cultivation
            if (DateUtilities.WithinDates(DateCultivation2, clock.Today, DateCultivation2))
				surfaceOrganicMatter.Incorporate(FracResidues2, CultivationDepth2);
            
            int i = -1;
            if (DateUtilities.WithinDates(DateResow, clock.Today, DateResow))
				foreach (var plant in plants)
              		if (TheSpecies2Sow != null && TheSpecies2Sow.Length > 0 && TheSpecies2Sow.Contains(plant.Name))
              		{
                		i += 1;
                		plant.Sow(cultivar: TheCultivars2Sow[i], population: 100.0, depth: 5.0, rowSpacing: 75.0);
              		}
        }
        



    }
}
```
      Operations
        1980-10-01  [AGPRyegrass].EndCrop()
        1980-10-01  [AGPRyegrass].Sow(cultivar: Prostrate, population: 100.0, depth: 5.0, rowSpacing: 75.0)
        1980-10-05  [AGPRyegrass].EndCrop()
        1980-10-05  [AGPWhiteClover].EndCrop()
        1980-10-08  [SurfaceOrganicMatter].Incorporate(0.7, 20)
        1980-10-15  [SurfaceOrganicMatter].Incorporate(0.5, 10)
        1980-10-17  [AGPRyegrass].Sow(cultivar: Erect, population: 100.0, depth: 5.0, rowSpacing: 75.0)
        1980-10-17  [AGPWhiteClover].Sow(cultivar: AGPWhiteClover, population: 100.0, depth: 5.0, rowSpacing: 75.0)
      SurfaceOrganicMatter: InitialResidueName=Sward; InitialResidueType=grass; InitialResidueMass=1000; InitialStandingFraction=0; InitialCPR=0; InitialCNR=15
      Soil: SoilType=NZ_Sedimentary; LocalName=Lismore; Site=Winchmore; NearestTown=Ashburton; Region=Canterbury; Country=New Zealand; Latitude=-48.48; Longitude=0
        Physical: same as AgPastureExample.Field.Soil.Physical
        Chemical: same as AgPastureExample.Field.Soil.Chemical
        WaterBalance SoilWater: same as AgPastureExample.Field.Soil.SoilWater
        Organic: same as AgPastureExample.Field.Soil.Organic
        Water: Thickness=[150, 150, 200, 150, 250, 300, 300]; InitialValues=[0.3495, 0.33, 0.18325, 0.0625, 0.0385, 0.029, 0.029]; FilledFromTop=false
        Nutrient
        Solute NO3: same as AgPastureExample.Field.Soil.NO3
        Solute NH4: same as AgPastureExample.Field.Soil.NH4
        Solute Urea: same as AgPastureExample.Field.Soil.Urea
        SoilTemperature Temperature: InteractionsPerDay=8
      PastureSpecies AGPRyegrass: doyGermination=275; daysEmergenceToAnthesis=120; daysAnthesisToMaturity=85; degreesDayForAnthesis=1100; degreesDayForMaturity=900; daysAnnualsFactor=45; CanopyType=PastureSpecies; InitialShootDM=1500; InitialRootDM=450; InitialRootDepth=750; initialDMFractionsGrasses=[0.15, 0.25, 0.25, 0.05, 0.05, 0.1, 0.1, 0.05, 0, 0, 0]; initialDMFractionsForbs=[0.2, 0.2, 0.15, 0.05, 0.1, 0.15, 0.1, 0.05, 0, 0, 0]; PhotosyntheticEfficiency=0.01; PhotosynthesisCurveFactor=0.8; FractionPAR=0.5; ReferenceCO2=380; CO2EffectScaleFactor=700; CO2EffectOffsetFactor=600; CO2EffectMinimum=0.7; CO2EffectExponent=2; ReproSeasonDurationCoeff=2; ReproSeasonShouldersLengthFactor=1; ReproSeasonOnsetDurationFactor=0.6; RelativeTurnoverEmerging=2; DetachmentDroughtCoefficient=3; DetachmentDroughtEffectMin=0.1; TurnoverStockFactor=0.01; TurnoverDefoliationEffectMin=0.025; MinimumGreenLeafProp=0.8; MinimumGreenRootProp=0.5
        initialDMFractionsLegumes=[0.16, 0.23, 0.22, 0.05, 0.03, 0.05, 0.05, 0.01, 0.04, 0.08, 0.08]
        LinearInterpolationFunction FVPDFunction
        Cultivar Prostrate: Command=[AGPRyegrass].LightExtinctionCoefficient = 0.6
        Cultivar Erect: Command=[AGPRyegrass].LightExtinctionCoefficient = 0.4
      PastureSpecies AGPWhiteClover: same as AgPastureExample.Field.AGPWhiteClover
      Report: EventNames=[Clock].EndOfDay
        VariableNames:
          [Clock].Today as Date
          [AGPRyegrass].AboveGroundWt + [AGPWhiteClover].AboveGroundWt as BiomassAG
          [AGPRyegrass].BelowGroundWt + [AGPWhiteClover].BelowGroundWt as BiomassBG
          [SurfaceOrganicMatter].Wt as Residues
          sum([Soil].Nutrient.FOM.C) as FOM_C
          [AGPRyegrass].LightExtinctionCoefficient
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