Simulations: Version=174
  DataStore
  Simulation
    Clock: Start=1995-01-01; End=2005-12-31
    Summary SummaryFile
    Weather: FileName=C:/Users/rmagala/OneDrive/simulations/urbana_mp_128yrs.met
    SoilArbitrator Soil Arbitrator
    Zone Field: Area=1; Slope=0; AspectAngle=0; Altitude=50
      Report carbon1: EventNames=[clock].StartOfYear
        VariableNames:
          [Clock].Today
          [Report].Name as Plotid
          [Clock].Today.Year as year
          [Maize].Phenology.CurrentStageName
          [Maize].AboveGround.Wt as Abiomas
          [Maize].Grain.Wt * 10 as grainwt
          [Maize].Total.Wt * 10 as maizeyield
          sum([Nutrient].FOM.C)  from 01-jan to [Clock].Today as FOM.c
          [Maize].BelowGround.Wt as BBiomass
          sum([Soil].Nutrient.TotalC)/1000 from 01-jan to [clock].Today as soc
          [SurfaceOrganicMatter].C as Total_surfaceCArbon
          [SurfaceOrganicMatter].wt as surface_organic_matter
          sum([Nutrient].Catm) as Soil_Respiration
          sum([Soil].Nutrient.TotalC[3:5])/1000 as Deeplayer_soil_Carbon
          sum([Soil].Nutrient.TotalC[1:3])/1000 as Toplayer_soil_Carbon
          sum of sum([Nutrient].N2Oatm[1:6]) from 01-jan to [Clock].Today as n20
          sum of sum([Nutrient].N2Oatm[1:6] from 01-jan to [Clock].Today as N20D20cm
          sum of sum([Nutrient].N2Oatm[1:9]) from 01-jan to [Clock].Today asN20
          [Soil].Nutrient.TotalC[1]/1000 from [clock].StartOfSimulation to [clock].Today as SOC_0_15CM
          [Soil].Nutrient.TotalC[2]/1000 from [clock].StartOfSimulation to [clock].Today as SOC_1_2
          SOC_1_2 + SOC_0_15CM as soccx
          sum([Soil].Nutrient.TotalC[1:2])/1000 as SOCD40CM
          [Nutrient].Catm[1] as RespD20cm
          sum([Nutrient].Catm[1:2]) as RespD40cm
          [Soil].Water.Volumetric as DUL
          [Soil].SoilWater.PAW as PAW
          [Report].Name as Plotid
          sum of sum([Nutrient].Catm[1:6]) from 01-jan to [Clock].Today as Top_respiration
          sum of sum([Nutrient].Catm[1:9]) from 01-jan to [Clock].Today as whole_respiration
          [Maize].Root.Total.Wt * 10 as RootBiomass
          [Soil].Nutrient.TotalC[7] as deepC
          [Soil].Nutrient.TotalC[8] as deepC8
          [Soil].Nutrient.TotalC[9] as deepC9
          [Soil].Nutrient.TotalC[10] as deepC10
      Report yield: EventNames=[Maize].Harvesting
        VariableNames:
          [Clock].Today
          [Report].Name as Plotid
          [Clock].Today.Year as year
          [Maize].Phenology.CurrentStageName
          [Maize].AboveGround.Wt as Abiomas
          [Maize].Grain.Wt * 10 as grainwt
          [Maize].Total.Wt * 10 as maizeyield
          sum([Nutrient].FOM.C)  from 01-jan to [Clock].Today as FOM.c
          [Maize].BelowGround.Wt as BBiomass
          sum([Soil].Nutrient.TotalC)/1000 from 01-jan to [clock].Today as soc
          [SurfaceOrganicMatter].C as Total_surfaceCArbon
          [SurfaceOrganicMatter].wt as surface_organic_matter
      Fertiliser
      SurfaceOrganicMatter: InitialResidueName=maize_stubble; InitialResidueType=maize; InitialResidueMass=500; InitialStandingFraction=0; InitialCPR=0; InitialCNR=120
      MicroClimate: a_interception=0; b_interception=1; c_interception=0; d_interception=0; SoilHeatFluxFraction=0.4; MinimumHeightDiffForNewLayer=0; NightInterceptionFraction=0.5; ReferenceHeight=2
      Plant Maize
      Manager HarvestingMaize
        Crop = [Maize]
```csharp
using APSIM.Shared.Utilities;
using Models.Utilities;
using Models.Soils;
using Models.PMF;
using Models.Core;
using System;

namespace Models
{
    [Serializable] 
    public class Script : Model
    {
        [Description("Crop")]
        public IPlant Crop { get; set; }
        
        [EventSubscribe("DoManagement")]
        private void OnDoManagement(object sender, EventArgs e)
        {
            if (Crop.IsReadyForHarvesting)
            {
                Crop.Harvest();
                Crop.EndCrop();
            }
        }
    }
}
```
      Soil Flanagan:242965: SoilType=Flanagan:242965; State=IL; Country=USA; ApsoilNumber=0; Latitude=40.104167; Longitude=-88.226111
        DataSource=SSURGO (https://sdmdataaccess.nrcs.usda.gov/) through R package soilDB, R package apsimx function ssurgo2sp. Timestamp 2022-03-14 16:13:27
        Comments=cokey = 20882360 - acres percent = 95 - component percent = 95 - taxonomic classification name = Fine, smectitic, mesic Aquic Argiudolls - drainage class = Somewhat poorly drained - elevation = 223 - slope = 0.9 - geomdesc = Talf
        Physical
          Thickness  ParticleSizeClay  ParticleSizeSand  ParticleSizeSilt  Rocks  BD     AirDry  LL15   DUL    SAT    KS
          150        24.2              9                 66.8              0      1.45   0.074   0.149  0.399  0.453  792.288
          150        26.8              8.4               64.8              0      1.34   0.074   0.149  0.389  0.494  792.288
          100        35.7              5.6               58.7              0      1.287  0.074   0.149  0.349  0.46   792.288
          200        40                5.2               54.8              0      1.35   0.176   0.176  0.426  0.434  792.288
          200        34.8              7.6               57.6              0      1.413  0.221   0.221  0.388  0.408  243.648
          200        26.4              12.7              60.9              0      1.377  0.221   0.221  0.388  0.423  243.648
          200        26.4              12.7              60.9              0      1.505  0.193   0.193  0.366  0.423  792.288
          200        16.2              26.7              57.1              0      1.608  0.152   0.152  0.307  0.34   792.288
          200        18                26.4              55.6              0.196  1.608  0.116   0.116  0.254  0.294  243.648
          200        18                26.4              55.6              0.196  1.608  0.116   0.116  0.254  0.294  243.648
          Rocks source: Calculated
          SoilCrop MaizeSoil
            LL=[0.149, 0.149, 0.149, 0.176, 0.221, 0.221, 0.193, 0.152, 0.116, 0.116]
            KL=[0.06, 0.049, 0.033, 0.04, 0.033, 0.027, 0.022, 0.018, 0.015, 0.012]
            XF=[1, 1, 1, 1, 1, 1, 1, 1, 1, 1]
          SoilCrop SoybeanSoil: same as Simulation.Field.Flanagan:242965.Physical.MaizeSoil
          SoilCrop WheatSoil: same as Simulation.Field.Flanagan:242965.Physical.MaizeSoil
        WaterBalance SoilWater: SummerDate=1-Nov; SummerU=5; SummerCona=5; WinterDate=1-Apr; WinterU=5; WinterCona=5; DiffusConst=40; DiffusSlope=16; Salb=0.12; CN2Bare=73; CNRed=20; CNCov=0.8; PSIDul=-100; Thickness=[150, 150, 300, 300, 300, 300, 300]; SWCON=[0.3, 0.3, 0.3, 0.3, 0.3, 0.3, 0.3]
        Organic: FOMCNRatio=40; CarbonUnits=Total
          Thickness  Carbon  SoilCNRatio  FBiom  FInert  FOM
          150        2.4     12           0.035  0.55    150
          150        1.92    12           0.033  0.808   122.81
          100        1.3     12           0.022  0.854   82.322
          200        1.2     12           0.027  0.916   100.548
          200        1.2     12           0.022  0.924   82.322
          200        0.6     12           0.018  0.833   67.399
          200        0.48    12           0.015  0.941   55.182
          200        0.36    12           0.012  0.961   45.179
          200        0.24    12           0.01   0.981   36.99
          200        0.24    12           0.001  0.991   30.284
        Chemical: Thickness=[150, 150, 100, 200, 200, 200, 200, 200, 200, 200]; PH=[5.1, 5.3, 6, 6.2, 6.7, 7.5, 7.5, 8.1, 8.3, 8.3]; PHUnits=Water
        Water: Thickness=[150, 150, 100, 200, 200, 200, 200, 200, 200, 200]; InitialPAWmm=0; RelativeTo=LL15; FilledFromTop=false
          InitialValues=[0.149, 0.149, 0.149, 0.176, 0.221, 0.221, 0.193, 0.152, 0.116, 0.116]
        CERESSoilTemperature Temperature
        Nutrient
        Solute NO3: Thickness=[150, 150, 100, 200, 200, 200, 200, 200, 200, 200]; InitialValuesUnits=ppm; WaterTableConcentration=0; D0=0; DepthConstant=0; MaxDepthSoluteAccessible=0; RunoffEffectivenessAtMovingSolute=0; MaxEffectiveRunoff=0
          InitialValues=[0.5, 0.495, 0.485, 0.49, 0.485, 0.48, 0.476, 0.471, 0.466, 0.462]
        Solute NH4: Thickness=[150, 150, 100, 200, 200, 200, 200, 200, 200, 200]; InitialValuesUnits=ppm; WaterTableConcentration=0; D0=0; DepthConstant=0; MaxDepthSoluteAccessible=0; RunoffEffectivenessAtMovingSolute=0; MaxEffectiveRunoff=0
          InitialValues=[0.05, 0.05, 0.049, 0.049, 0.049, 0.048, 0.048, 0.047, 0.047, 0.046]
        Solute Urea: Thickness=[150, 150, 100, 200, 200, 200, 200, 200, 200, 200]; InitialValues=[0, 0, 0, 0, 0, 0, 0, 0, 0, 0]; InitialValuesUnits=kg/ha; WaterTableConcentration=0; D0=0; DepthConstant=0; MaxDepthSoluteAccessible=0; RunoffEffectivenessAtMovingSolute=0; MaxEffectiveRunoff=0
      Manager Tillage
        Fraction = 0.65
        Depth = 350
        AppplyTillageOption = yes
```csharp
using Models.Soils;
using System;
using Models.Core;
using Models.PMF;
using APSIM.Shared.Utilities;
using Models.Surface;

namespace Models
{
    [Serializable]
    public class Script : Model
    {
        [Link] Clock Clock;
        [Link] SurfaceOrganicMatter SOM;
        [Link(IsOptional = true)] private IPlant existingCrop;
        [Link] ISummary Summary;
        [Separator("Applies tillage to an existing crop when it is ending")]
        //[Description("Crop")]
        //public IPlant Crop { get; set; }
        
        [Description("Fraction of Residues To Incorporate (0-1)")]
        public double Fraction { get; set; }
        
        [Description("Depth of Tillage (mm)")]
        public double Depth { get; set; }
        
        
        public enum ApplyTillage { yes, no }
        [Description("Do you want to till the land?")] 
        public ApplyTillage AppplyTillageOption { get; set; }

        [EventSubscribe("PlantEnding")]
        private void OnEndCrop(object sender, EventArgs e)
        {
            Model existingCrop = sender as Model;
            if (existingCrop != null && existingCrop.Name.ToLower() == (existingCrop as IModel).Name.ToLower()&& ApplyTillage.yes ==AppplyTillageOption)
            
            {
           
            SOM.Incorporate(Fraction, Depth);
            
           }
           
           
             Summary.WriteMessage(this, $"Tillage is applied to: {existingCrop.Name}", MessageType.Information);
        }
    }
}
```
      Report carbon_change: EventNames=[Clock].EndOfSimulation
        VariableNames:
          diff of ([Soil].Nutrient.TotalC[1])/1000 from [Clock].StartOfSimulation to [Clock].EndOfSimulation as changeincarbon
          diff of sum([Soil].Nutrient.TotalC[1:2])/1000 from [Clock].StartOfSimulation to [Clock].EndOfSimulation as changeincarbon2
          changeincarbon + changeincarbon2 as to_carb
          (-1 * to_carb *(44/12))*1000 as co_eq
          [Simulation].Name as Name
      Report MaizeR: EventNames=[Maize].Harvesting
        VariableNames:
          [Clock].Today
          [Clock].Today.Year as Year
          [Maize].AboveGround.Wt*10  as M_AGB
          [Maize].AboveGround.N as MAIZE_AGB_NITROGEN
          [Maize].Grain.Total.Wt * 10 as Maize_Yield
          [Maize].Grain.Total.Wt * 10 as mYield
          [Simulation].Name as Name
      Report Annual: EventNames=[Clock].EndOfYear
        VariableNames:
          // Time
          [Clock].Today as Date
          [Clock].Today.Year as an_Year
          [Soil].Physical.BD[1] as BD
          // Carbon
          [Soil].Nutrient.TotalC[1]/1000 as SOC1
          sum([Soil].Nutrient.TotalC[1:2])/1000 as SOC2
          sum of sum([Nutrient].Catm[1:10]) from 01-jan to [Clock].Today as Whole_repsiration
          sum of sum([Nutrient].Catm[1:6]) from 01-jan to [Clock].Today  as  Top_respiration
          sum([Soil].Nutrient.TotalC[1:2])/1000 as TPC
          // Nitrogen
          [SoilWater].FlowNO3[1] as flowNitrate
          sum of Sum( [Soil].NO3.ppm[1:2]) from 01-jan to [Clock].Today as NConc
          [Soil].NO3.ppm[1] as N03Ncon
          [Soil].NO3.ppm[2] as N03Ncon2
          [Soil].NO3.ppm[3] *0.8 as N03Ncon3
          Sum of [Soil].SoilWater.LeachNO3 from 01-jan to [Clock].Today as CumuAnnualLeach
          sum([Soil].NO3.kgha) as NO3Total
          sum of sum([Nutrient].N2Oatm[1:6]) from 01-Mar to [Clock].Today as TopN2O
          sum of sum([Nutrient].N2Oatm[1:8]) from 01-Mar to [Clock].Today as  n20
          sum([Soil].Nutrient.NO3.kgha[1:2]) as MineralN
          sum of [Soil].SoilWater.LeachNO3 from [Annual].DayAfterLastOutput to [clock].Today as LeachNO3
          // Water
          sum of ([Soil].SoilWater.Runoff) from 01-jan to [Clock].Today as runoff
          sum of [Soil].SoilWater.Drainage from [Annual].DayAfterLastOutput to [clock].Today as drainaged_run_off
          SOC1 + SOC2 as total_carbon
          // Calculate Nitrate Loss. 0.01 converts to kg per hectare
          runoff * (N03Ncon + N03Ncon2 + N03Ncon3) *0.01  as Nloss
          // calculalate carbon dioxide equivalent
           n20 *(44/28) *165 as no2_eq
           TopN2O *(44/28) *165 as top_no2_eq
           // Weather and soil water
          [Simulation].Name as Name
          sum of [weather].rain from 01-jan to [clock].Today as mean_rain
          sum of [weather].MaxT  from 01-jan to [Clock].Today as mean_maxt
          sum  of [weather].MinT from 01-jan to [Clock].Today as mean_mint
          sum  of [weather].Radn from 01-jan to [Clock].Today as total_radn
          mean  of [Water].PAW[1] from 01-jan to [Clock].Today as PAWC1
          mean  of [Water].PAW[2] from 01-jan to [Clock].Today as PAWC2
          mean  of [Soil].SoilWater.SW[1] from 01-jan to [Clock].Today as SW1
          mean  of [Soil].SoilWater.SW[2] from 01-jan to [Clock].Today as SW2
          mean  of [Soil].SoilWater.SW[3] from 01-jan to [Clock].Today as SW3
      Manager Simple Rotation
        Crops = Soybean, Maize
```csharp
using Models.Soils;
using System.Collections.Generic;
using APSIM.Shared.Utilities;
using Models.PMF;
using Models.Interfaces;
using Models.Core;
using System;

namespace Models
{
    [Serializable]
    public class Script : Model
    {
        [Link] IClock Clock;
        [Link] ISummary Summary;
        
        [Description("Rotation Sequence (comma separated crop names)")]
        public string[] Crops { get; set; }
        
        // Repeating cycle of input crops. Don't loop on this, loop on Crops
        private IEnumerable<string> cropsEnum()
        {
            var counter = 0;
            while (true)
            {
                yield return Crops[counter];
                ++counter;
                if (counter >= Crops.Length)
                    counter = 0;
            }
        }
        
        private IEnumerator<string> cropCycle;
        
        [Description("Next crop to sow in the simple rotation.")]
        public string NextCrop
        { get => cropCycle.Current; }
        
        [EventSubscribe("StartOfSimulation")]
        private void Init(object sender, EventArgs e)
        {
            // TODO: Error if Crops is empty.
            cropCycle = cropsEnum().GetEnumerator();
            // Set to first value.
            cropCycle.MoveNext();
        }

        [EventSubscribe("PlantEnding")]
        private void OnEndCrop(object sender, EventArgs e)
        {
            // Currently assumes only one crop in the ground, so does not check if the  
            // harvested crop is this script's current crop.
            var old = NextCrop;
            cropCycle.MoveNext();
            var _new = NextCrop;
            Summary.WriteMessage(this, $"Rotation finished with {old}, next up: {_new}.", MessageType.Information);
        }
    }
}
```
      Manager SowMaize
        Rotations = [Simple Rotation]
        Crop = [Maize]
        StartDate = 18-Apr
        EndDate = 1-May
        MinESW = 200
        MinRain = 30
        RainDays = 3
        CultivarName = B_110
        SowingDepth = 50
        RowSpacing = 750
        Population = 8.65
        MustSow = True
```csharp
using Models.Interfaces;
using APSIM.Shared.Utilities;
using Models.Utilities;
using Models.Soils;
using Models.PMF;
using Models.Core;
using System;
using Models.Climate;

namespace Models
{
    [Serializable]
    public class Script : Model
    {
        [Link] private Clock Clock;
        [Link] private Summary Summary;
        private Accumulator accumulatedRain;
        [Link]
        private ISoilWater waterBalance;
        
        [Description("Simple Rotation Manager")]
        public Manager Rotations { get; set; }
        
        [Separator("Sowing Info")]
        
        [Description("Crop")]
        public IPlant Crop { get; set; }

        [Description("Start of sowing window (d-mmm)")]
        public string StartDate { get; set; }

        [Description("End of sowing window (d-mmm)")]
        public string EndDate { get; set; }

        [Description("Minimum extractable soil water for sowing (mm)")]
        public double MinESW { get; set; }

        [Description("Accumulated rainfall required for sowing (mm)")]
        public double MinRain { get; set; }

        [Description("Duration of rainfall accumulation (d)")]
        public int RainDays { get; set; }

        [Display(Type = DisplayType.CultivarName)]
        [Description("Cultivar to be sown")]
        public string CultivarName { get; set; }

        [Description("Sowing depth (mm)")]
        public double SowingDepth { get; set; }

        [Description("Row spacing (mm)")]
        public double RowSpacing { get; set; }

        [Description("Plant population (/m2)")]
        public double Population { get; set; }
        
        [Description("Must sow by end date?")]
        public bool MustSow { get; set; }
        
        
        [EventSubscribe("StartOfSimulation")]
        private void OnSimulationCommencing(object sender, EventArgs e)
        {
            accumulatedRain = new Accumulator(this, "[Weather].Rain", RainDays);
        }

        [EventSubscribe("DoManagement")]
        private void OnDoManagement(object sender, EventArgs e)
        {
            accumulatedRain.Update();
            if (!Crop.IsAlive &&
                   DateUtilities.WithinDates(StartDate, Clock.Today, EndDate))
               {
                   var rainSum = accumulatedRain.Sum;
                   var eswSum  = MathUtilities.Sum(waterBalance.ESW);
                   if (rainSum > MinRain && eswSum > MinESW ||
                       DateUtilities.DatesEqual(EndDate, Clock.Today) && MustSow)
                   {
                       var thisCrop = Crop.Name.ToLower();
                       var nextCrop = (string)Rotations?.FindByPath("Script.NextCrop")?.Value;
                       if (thisCrop == (nextCrop?.ToLower() ?? thisCrop))
                           Crop.Sow(population: Population,
                                 cultivar: CultivarName,
                                 depth: SowingDepth,
                                 rowSpacing: RowSpacing);
                   }
               }
        }
    }
}
```
      Manager HarvestSoy
        Crop = [Soybean]
        Date = 19-sep
```csharp
using APSIM.Shared.Utilities;
using Models.Utilities;
using Models.Soils;
using Models.PMF;
using Models.Core;
using System;

namespace Models
{
    [Serializable] 
    public class Script : Model
    {
        [Link] IClock Clock;
        
        [Separator("Harvesting script that forces harvesting")]
        [Description("Crop")]
        public IPlant Crop { get; set; }
        
        [Description("Date to force harvesting by if crop is not ready (d-mmm)")]
        public string Date { get; set; }
        
        [EventSubscribe("DoManagement")]
        private void OnDoManagement(object sender, EventArgs e)
        {
            if (Crop.IsReadyForHarvesting || 
                (DateUtilities.DatesAreEqual(Date, Clock.Today) && Crop.IsAlive))
            {
                Crop.Harvest();
                Crop.EndCrop();
            }
        }
    }
}
```
      Manager SowSoy
        Rotations = [Simple Rotation]
        Crop = [Soybean]
        StartDate = 1-may
        EndDate = 15-May
        MinESW = 200
        MinRain = 30
        RainDays = 3
        CultivarName = IA1006_MG10
        SowingDepth = 50
        RowSpacing = 750
        Population = 30
        MustSow = True
        script: same as in Simulation.Field.SowMaize
      Plant Soybean
      Report SoybeanR: EventNames=[Soybean].Harvesting
        VariableNames:
          [Clock].Today as date_in_soybean
          [Clock].Today.Year as Year_in_soybean
          [Soybean].AboveGround.Wt*10  as soy_AGB
          [Soybean].Grain.Total.Wt * 10 as SoyYield
      Manager Fertilise at sowing
        Crop = [Maize]
        FertiliserType = UreaN
        Amount = 200
```csharp
using Models.Soils;
using System;
using System.Linq;
using Models.Core;
using Models.PMF;
namespace Models
{
    [Serializable]
    public class Script : Model
    {
        [Link] Clock Clock;
        [Link] Fertiliser Fertiliser;
        
        [Description("Crop to be fertilised")]
        public IPlant Crop { get; set; }

        [Description("Type of fertiliser to apply? ")] 
        public Fertiliser.Types FertiliserType { get; set; }
    
        [Description("Amount of fertiliser to be applied (kg/ha)")]
        public double Amount { get; set; }
        
        [EventSubscribe("Sowing")]
        private void OnSowing(object sender, EventArgs e)
        {
            Model crop = sender as Model;
            if (Crop != null && crop.Name.ToLower() == (Crop as IModel).Name.ToLower())
                Fertiliser.Apply(Amount: Amount, Type: FertiliserType);
        }
    }
}
```
      Report: EventNames=[Maize].Harvesting
        VariableNames:
          [Clock].Today
          [Clock].Today.Year as Year
          [Maize].AboveGround.Wt*10  as M_AGB
          [Maize].AboveGround.N as MAIZE_AGB_NITROGEN
          [Maize].Grain.Total.Wt * 10 as Maize_Yield
          [Maize].Grain.Total.Wt * 10 as Yield
          [Simulation].Name as Name
    Memo
      N application is applied as sowing only in this plot
