Simulations Simulations_12: Version=213
  Simulation Sharpsburg_12
    Clock: Start=1990-01-01; End=2014-12-31
    Summary SummaryFile
    Weather
      FileName=D:/Elimin_rye_cover_crop_2026/Data_RyeBiomass_Analysis/APSIM_Inputs_needed/Weather_Iowa SW.met
    SoilArbitrator Soil Arbitrator
    Zone Field1: Area=1; Slope=0; AspectAngle=0; Altitude=50
      Report MaizeR: EventNames=[Maize].Harvesting
        VariableNames:
          [Clock].Today
          [Clock].Today.Year as Year
          [Clock].Today.Month as Month
          [Maize].AboveGround.Wt*10  as AGB
          [Maize].AboveGround.N
          [Maize].Grain.Total.Wt * 10 as Yield
          [Soil].Nutrient.TotalC[1]/1000 as soc0_10cm
          [Soil].Nutrient.TotalC[2]/1000 as SOC10_30cm
          sum of sum([Nutrient].N2Oatm from 01-jan to [Clock].Today as N2O
          sum of sum([Nutrient].N2Oatm[1:6]) from 01-jan to [Clock].Today as TopN2O
          sum([Soil].NO3.kgha) as NO3Total
          sum([Soil].NH4.kgha) as NH4Total
          sum of sum([Soil].Nutrient.DenitrifiedN) as Denitrification
          [Report].Name as Plotid
          [Soil].Longitude as longitude
          [Soil].Latitude as latitude
          [Soil].Site as gridcode
          [Soil].RecordNumber as OBJECTID
          [Soil].SoilType as soiltype
      Report Annual: EventNames=[Clock].EndOfYear
        VariableNames:
          [Clock].Today
          [Clock].Today.Year as Year
          [Clock].Today.Month as Month
          sum([Soil].Nutrient.TotalC[1:2])/1000 as Toplayer_soil_Carbon
          sum of sum([Nutrient].Catm[1:6]) from 01-jan to [Clock].Today as Top_respiration
          sum of sum([Nutrient].Catm[1:10]) from 01-jan to [Clock].Today as Whole_repsiration
          sum of sum([Nutrient].N2Oatm) from 01-jan to [Clock].Today as n20
          sum of sum([Nutrient].N2Oatm[1:6]) from 01-jan to [Clock].Today as TopN2O
          sum of sum([Nutrient].N2Oatm[1:6]) from 01-jan to [Clock].Today as TN2O
          [Soil].Nutrient.TotalC[1]/1000 as SOC1
          Sum of [Soil].SoilWater.LeachNO3 from 1-Jan to [Clock].Today as CumulativeAnnualLeaching
          sum([Soil].Nutrient.TotalC[1:2])/1000 as SOC2
      Fertiliser
      SurfaceOrganicMatter: InitialResidueName=soybean; InitialResidueType=soybean; InitialResidueMass=1250; InitialStandingFraction=0; InitialCPR=0; InitialCNR=27
      Plant Maize
      MicroClimate: a_interception=0; b_interception=1; c_interception=0; d_interception=0; SoilHeatFluxFraction=0.4; MinimumHeightDiffForNewLayer=0; NightInterceptionFraction=0.5; ReferenceHeight=2
      Plant Soybean
      Plant Wheat
      Manager SowMaize
        Rotations = [Simple Rotation]
        Crop = [Maize]
        StartDate = 1-May
        EndDate = 15-May
        MinESW = 200
        MinRain = 30
        RainDays = 3
        CultivarName = e_Maize_B_110
        SowingDepth = 50
        RowSpacing = 750
        Population = 8.65
        MustSow = True
```csharp
using System;
using APSIM.Core;
using APSIM.Numerics;
using APSIM.Shared.Utilities;
using APSIM.Shared.Documentation;
using Models.Climate;
using Models.Core;
using Models.Interfaces;
using Models.PMF;
using Models.Soils;
using Models.Utilities;

namespace Models
{
    [Serializable]
    public class Script : Model, IStructureDependency
    {
        [Link] private Clock Clock;
        [Link] private Summary Summary;
        [Link] private ISoilWater waterBalance;

        private Accumulator accumulatedRain;

        public IStructure Structure { get; set; }

        [Description("Simple Rotation Manager")]
        public Manager Rotations { get; set; }

        [Separator("Sowing Info")]

        [Description("Crop")]
        public IPlant Crop { get; set; }

        [Description("Start of sowing window (d-mmm)")]
        public string StartDate { get; set; }

        [Description("End of sowing window (d-mmm)")]
        public string EndDate { get; set; }

        [Description("Minimum extractable soil water for sowing (mm)")]
        public double MinESW { get; set; }

        [Description("Accumulated rainfall required for sowing (mm)")]
        public double MinRain { get; set; }

        [Description("Duration of rainfall accumulation (d)")]
        public int RainDays { get; set; }

        [Display(Type = DisplayType.CultivarName)]
        [Description("Cultivar to be sown")]
        public string CultivarName { get; set; }

        [Description("Sowing depth (mm)")]
        public double SowingDepth { get; set; }

        [Description("Row spacing (mm)")]
        public double RowSpacing { get; set; }

        [Description("Plant population (/m2)")]
        public double Population { get; set; }

        [Description("Must sow by end date?")]
        public bool MustSow { get; set; }

        [EventSubscribe("StartOfSimulation")]
        private void OnSimulationCommencing(object sender, EventArgs e)
        {
            accumulatedRain = new Accumulator(this, "[Weather].Rain", RainDays);
        }

        [EventSubscribe("DoManagement")]
        private void OnDoManagement(object sender, EventArgs e)
        {
            accumulatedRain.Update();

            if (!Crop.IsAlive &&
                DateUtilities.WithinDates(StartDate, Clock.Today, EndDate))
            {
                double rainSum = accumulatedRain.Sum;
                double eswSum = MathUtilities.Sum(waterBalance.ESW);

                if ((rainSum > MinRain && eswSum > MinESW) ||
                    (DateUtilities.DatesEqual(EndDate, Clock.Today) && MustSow))
                {
                    string thisCrop = Crop.Name.ToLower();

                    string nextCrop = Rotations.GetProperty("NextCrop") as string;

                    if (thisCrop == (nextCrop?.ToLower() ?? thisCrop))
                    {
                        Crop.Sow(
                            population: Population,
                            cultivar: CultivarName,
                            depth: SowingDepth,
                            rowSpacing: RowSpacing);
                    }
                }
            }
        }
    }
}
```
      Manager SowWheat
        Rotations = [Simple Rotation]
        Crop = [Wheat]
        StartDate = 1-oct
        EndDate = 5-oct
        MinESW = 100
        MinRain = 15
        RainDays = 7
        CultivarName = Yecora___edited
        SowingDepth = 40
        RowSpacing = 150
        Population = 350
        MustSow = True
        script: same as in Sharpsburg_12.Field1.SowMaize
      Manager SowSoy
        Rotations = [Simple Rotation]
        Crop = [Soybean]
        StartDate = 1-may
        EndDate = 25-May
        MinESW = 200
        MinRain = 30
        RainDays = 3
        CultivarName = PioneerP9504_MG50
        SowingDepth = 30
        RowSpacing = 750
        Population = 35
        MustSow = True
```csharp
using System;
using APSIM.Core;
using APSIM.Numerics;
using APSIM.Shared.Utilities;
using Models.Climate;
using Models.Core;
using Models.Interfaces;
using Models.PMF;
using Models.Soils;
using Models.Utilities;
using APSIM.Shared.Documentation;

namespace Models
{
    [Serializable]
    public class Script : Model, IStructureDependency
    {
        [Link] private Clock Clock;
        [Link] private Summary Summary;
        [Link] private ISoilWater waterBalance;

        private Accumulator accumulatedRain;

        public IStructure Structure { get; set; }

        [Description("Simple Rotation Manager")]
        public Manager Rotations { get; set; }

        [Separator("Sowing Info")]

        [Description("Crop")]
        public IPlant Crop { get; set; }

        [Description("Start of sowing window (d-mmm)")]
        public string StartDate { get; set; }

        [Description("End of sowing window (d-mmm)")]
        public string EndDate { get; set; }

        [Description("Minimum extractable soil water for sowing (mm)")]
        public double MinESW { get; set; }

        [Description("Accumulated rainfall required for sowing (mm)")]
        public double MinRain { get; set; }

        [Description("Duration of rainfall accumulation (d)")]
        public int RainDays { get; set; }

        [Display(Type = DisplayType.CultivarName)]
        [Description("Cultivar to be sown")]
        public string CultivarName { get; set; }

        [Description("Sowing depth (mm)")]
        public double SowingDepth { get; set; }

        [Description("Row spacing (mm)")]
        public double RowSpacing { get; set; }

        [Description("Plant population (/m2)")]
        public double Population { get; set; }

        [Description("Must sow by end date?")]
        public bool MustSow { get; set; }

        [EventSubscribe("StartOfSimulation")]
        private void OnSimulationCommencing(object sender, EventArgs e)
        {
            accumulatedRain = new Accumulator(this, "[Weather].Rain", RainDays);
        }

        [EventSubscribe("DoManagement")]
        private void OnDoManagement(object sender, EventArgs e)
        {
            accumulatedRain.Update();

            if (!Crop.IsAlive &&
                DateUtilities.WithinDates(StartDate, Clock.Today, EndDate))
            {
                double rainSum = accumulatedRain.Sum;
                double eswSum = MathUtilities.Sum(waterBalance.ESW);

                if ((rainSum > MinRain && eswSum > MinESW) ||
                    (DateUtilities.DatesEqual(EndDate, Clock.Today) && MustSow))
                {
                    string thisCrop = Crop.Name.ToLower();

                    string nextCrop = Rotations.GetProperty("NextCrop") as string;

                    if (thisCrop == (nextCrop?.ToLower() ?? thisCrop))
                    {
                        Crop.Sow(
                            population: Population,
                            cultivar: CultivarName,
                            depth: SowingDepth,
                            rowSpacing: RowSpacing);
                    }
                }
            }
        }
    }
}
```
      Manager Simple Rotation
        Crops = Maize
```csharp
using Models.Soils;
using System.Collections.Generic;
using APSIM.Shared.Utilities;
using Models.PMF;
using Models.Interfaces;
using Models.Core;
using System;

namespace Models
{
    [Serializable]
    public class Script : Model
    {
        [Link] IClock Clock;
        [Link] ISummary Summary;
        
        [Description("Rotation Sequence (comma separated crop names)")]
        public string[] Crops { get; set; }
        
        // Repeating cycle of input crops. Don't loop on this, loop on Crops
        private IEnumerable<string> cropsEnum()
        {
            var counter = 0;
            while (true)
            {
                yield return Crops[counter];
                ++counter;
                if (counter >= Crops.Length)
                    counter = 0;
            }
        }
        
        private IEnumerator<string> cropCycle;
        
        [Description("Next crop to sow in the simple rotation.")]
        public string NextCrop
        { get => cropCycle.Current; }
        
        [EventSubscribe("StartOfSimulation")]
        private void Init(object sender, EventArgs e)
        {
            // TODO: Error if Crops is empty.
            cropCycle = cropsEnum().GetEnumerator();
            // Set to first value.
            cropCycle.MoveNext();
        }

        [EventSubscribe("PlantEnding")]
        private void OnEndCrop(object sender, EventArgs e)
        {
            // Currently assumes only one crop in the ground, so does not check if the  
            // harvested crop is this script's current crop.
            var old = NextCrop;
            cropCycle.MoveNext();
            var _new = NextCrop;
            Summary.WriteMessage(this, $"Rotation finished with {old}, next up: {_new}.", MessageType.Information);
        }
    }
}
```
      Manager HarvestMaize
        Crop = [Maize]
        Date = 20-apr
```csharp
using APSIM.Shared.Utilities;
using Models.Utilities;
using Models.Soils;
using Models.PMF;
using Models.Core;
using System;

namespace Models
{
    [Serializable] 
    public class Script : Model
    {
        [Link] IClock Clock;
        
        [Separator("Harvesting script that forces harvesting")]
        [Description("Crop")]
        public IPlant Crop { get; set; }
        
        [Description("Date to force harvesting by if crop is not ready (d-mmm)")]
        public string Date { get; set; }
        
        [EventSubscribe("DoManagement")]
        private void OnDoManagement(object sender, EventArgs e)
        {
            if (Crop.IsReadyForHarvesting || 
                (DateUtilities.DatesAreEqual(Date, Clock.Today) && Crop.IsAlive))
            {
                Crop.Harvest();
                Crop.EndCrop();
            }
        }
    }
}
```
      Manager HarvestSoy
        Crop = [Soybean]
        Date = 19-Oct
        script: same as in Sharpsburg_12.Field1.HarvestMaize
      Manager HarvestWheat
        Crop = [Wheat]
        Date = 28-april
```csharp
using System;
using APSIM.Shared.Utilities;
using APSIM.Shared.Documentation;
using Models.Core;
using Models.PMF;
using Models.Soils;
using Models.Utilities;

namespace Models
{
    [Serializable]
    public class Script : Model
    {
        [Link] private Clock Clock;

        [Separator("Harvesting script that forces harvesting")]
        [Description("Crop")]
        public IPlant Crop { get; set; }

        [Description("Date to force harvesting by if crop is not ready (d-mmm)")]
        public string Date { get; set; }

        [EventSubscribe("DoManagement")]
        private void OnDoManagement(object sender, EventArgs e)
        {
            if (Crop.IsReadyForHarvesting ||
                (DateUtilities.DatesEqual(Date, Clock.Today) && Crop.IsAlive))
            {
                Crop.Harvest();
                Crop.EndCrop();
            }
        }
    }
}
```
      Manager AddfertlizerRotationMAize
        Crop = [Maize]
        FertiliserType = UreaN
        Fraction = 1
        Amount = 150
        FertiliserDates = 30-may
        AmountType = True
```csharp
using Models.Soils;
using System;
using Models.Core;
using Models.PMF;
using APSIM.Shared.Utilities;
namespace Models
{
    [Serializable]
    public class Script : Model
    {
        [Link] Clock Clock;
        
        [Link] Fertiliser Fertiliser;
        [Link] ISummary Summary;
        [Separator("Crop in the rotation to apply fertilizers")]
        [Description("Crop")]
        public IPlant Crop { get; set; }
        
        [Separator("Fertilizer application details")]

        [Description("Type of fertiliser to apply? Select from a list. ")] 
        [Display(Type = DisplayType.FertiliserType)]public string FertiliserType { get; set; }
        
        [Description("Fraction to apply at sowing (0-1). if it is a single application, it should be 1")]
        public double Fraction { get; set; }

        [Description("Enter the total amount of fertiliser to be applied (kg /ha)")] 
        public double Amount { get; set; }
        
        [Description("Enter other dates as dd-mmm with comma separation (any year information entered will be ignored): ")] 
        public string[] FertiliserDates { get; set; } 
        
        [Description("Is the remaining amount to be applied each time? (true/ticked)? Or is it the total annual amount across all dates (no(false)/unticked)")] 
        public bool AmountType { get; set; }
        
        [EventSubscribe("Sowing")]
        private void OnSowing(object sender, EventArgs e)
        {
            Model crop = sender as Model;
            var nit = Fraction * Amount;
            if (Crop != null && crop.Name.ToLower() == (Crop as IModel).Name.ToLower())
                Fertiliser.Apply(amount: nit, type: FertiliserType);
        }
        
        [EventSubscribe("DoManagement")]
        private void OnDoManagement(object sender, EventArgs e)
        {
            foreach (string ddMMM in FertiliserDates)
            {
             var nit = Fraction * Amount;
             var otherNapp = Amount - nit;
                if (Crop.IsAlive & DateUtilities.DatesEqual(ddMMM, Clock.Today))
                {
                    if (AmountType)
                        Fertiliser.Apply(amount: otherNapp, type: FertiliserType);
                        
                    else
                        Fertiliser.Apply(amount: otherNapp / FertiliserDates.Length, type: FertiliserType);
                        Summary.WriteMessage(this, $"At other date(s), {Crop.Name} received {otherNapp} Kg of Nitrogen applied as {FertiliserType}. {AmountType} was selected: true implies that the user specified amount was applied on each date and false implies that the amount was applied across dates", MessageType.Information);
                }
            }
        }
    }
}
```
      Manager AddfertlizerRotationWheat
        Crop = [Wheat]
        FertiliserType = UreaN
        Fraction = 0.3777778
        Amount = 180
        FertiliserDates = 20-march
        AmountType = False
        script: same as in Sharpsburg_12.Field1.AddfertlizerRotationMAize
      Manager PostharvestillageWheat
        Crop = [Wheat]
        Fraction = 1
        Depth = 150
```csharp
using Models.Soils;
using System;
using Models.Core;
using Models.PMF;
using APSIM.Shared.Utilities;
using Models.Surface;

namespace Models
{
    [Serializable]
    public class Script : Model
    {
        [Link] Clock Clock;
        [Link] SurfaceOrganicMatter SOM;
        
        [Separator("Crop Field to apply tillage")]
        [Description("Crop")]
        public IPlant Crop { get; set; }
        
        [Description("Fraction of Residues To Incorporate (0-1)")]
        public double Fraction { get; set; }

        [Description("Depth of Tillage (mm)")]
        public double Depth { get; set; }

        [EventSubscribe("PlantEnding")]
        private void OnEndCrop(object sender, EventArgs e)
        {
         
            Model crop = sender as Model;
            if (Crop != null && crop.Name.ToLower() == (Crop as IModel).Name.ToLower())
            SOM.Incorporate(Fraction, Depth);
        }
    }
}
```
      Manager PostharvestillageSoybean
        Crop = [Soybean]
        Fraction = 1
        Depth = 150
        script: same as in Sharpsburg_12.Field1.PostharvestillageWheat
      Manager PostharvestillageMaize
        Crop = [Maize]
        Fraction = 1
        Depth = 150
        script: same as in Sharpsburg_12.Field1.PostharvestillageWheat
      Soil sharspburg: SoilType=Nicollet loam, 1 to 3 percent slopes; LocalName=Nicollet; Latitude=42.0857; Longitude=-93.658723; Comments=number of layers: 10, max depth: 2400mm
        DataSource:
          Nicollet: downloaded by apsimNGpy: `DownloadsurgoSoiltables`
           accessed from SSURGO on: 2026-01-12T21:34:17
        Physical
          Thickness  ParticleSizeSand  ParticleSizeSilt  ParticleSizeClay  BD       AirDry    LL15      DUL       SAT       KS
          100        31                43                26                1.272    0.0825    0.165     0.375961  0.5       792.45
          100        31                43                26                1.378    0.1494    0.166     0.374961  0.46      792.45
          100        33.5005           40.4995           26                1.4045   0.1492    0.1575    0.352509  0.45      792.45
          295        36.001            37.999            26                1.431    0.149     0.149     0.329058  0.44      792.45
          297        37.8567           37.7144           24.429            1.46129  0.141286  0.141286  0.321339  0.428571  792.45
          298        39.7134           37.4287           22.8579           1.49157  0.133571  0.133571  0.313625  0.417143  792.45
          300        41.5701           37.1431           21.2869           1.52186  0.125857  0.125857  0.305911  0.405714  792.45
          301        43.4268           36.8574           19.7158           1.55214  0.118143  0.118143  0.298197  0.394286  792.45
          303        45.2834           36.5718           18.1448           1.58243  0.110429  0.110429  0.290482  0.382857  792.45
          304        47.1401           36.2861           16.5737           1.61271  0.102714  0.102714  0.282768  0.371429  792.45
          SoilCrop MaizeSoil
            LL=[0.0825, 0.1494, 0.1492, 0.149, 0.141286, 0.133571, 0.125857, 0.118143, 0.110429, 0.102714]
            KL=[0.08, 0.08, 0.08, 0.07, 0.06, 0.05, 0.04, 0.03, 0.016, 0.013]
            XF=[1, 1, 1, 1, 1, 1, 1, 1, 1, 1]
          SoilCrop SoybeanSoil: same as Sharpsburg_12.Field1.sharspburg.Physical.MaizeSoil
          SoilCrop WheatSoil: same as Sharpsburg_12.Field1.sharspburg.Physical.MaizeSoil
        Organic: FOMCNRatio=40; CarbonUnits=Total
          Thickness  Carbon  SoilCNRatio  FBiom  FInert  FOM
          100        2.05    12           0.04   0.4     150
          100        2.326   12           0.032  0.44    122.81
          100        1.526   12           0.017  0.524   100.548
          295        0.726   12           0.014  0.612   82.3217
          297        0.644   12           0.011  0.762   67.3993
          298        0.561   12           0.01   0.8     55.1819
          300        0.478   12           0.01   0.8     45.1791
          301        0.395   12           0.01   0.856   36.9895
          303        0.312   12           0.009  0.899   30.2845
          304        0.229   12           0.007  0.908   24.7948
        Chemical: Thickness=[100, 100, 100, 295, 297, 298, 300, 301, 303, 304]; PH=[6.2, 6.2, 6.4, 6.6, 6.8, 7, 7.2, 7.4, 7.6, 7.8]; PHUnits=Water
        Water: Thickness=[100, 100, 100, 295, 297, 298, 300, 301, 303, 304]; FilledFromTop=true
          InitialValues=[0.375961, 0.374961, 0.352509, 0.329058, 0.321339, 0.207759, 0.125857, 0.118143, 0.110429, 0.102714]
        Nutrient
        WaterBalance SoilWater: SummerDate=1-jun; SummerU=8.55; SummerCona=3.775; WinterDate=1-nov; WinterU=8.55; WinterCona=3.775; DiffusConst=40; DiffusSlope=16; Salb=0.13; CN2Bare=76; CNRed=20; CNCov=0.8; PSIDul=-100; Thickness=[100, 100, 100, 295, 297, 298, 300, 301, 303, 304]
          SWCON=[0.276998, 0.218831, 0.24998, 0.284658, 0.283638, 0.282557, 0.281417, 0.280215, 0.278945, 0.2776]
        Solute NO3: Thickness=[100, 100, 100, 295, 297, 298, 300, 301, 303, 304]; InitialValues=[11, 2, 1, 1, 1, 1, 1, 1, 0.462, 0.457]; InitialValuesUnits=ppm; WaterTableConcentration=0; D0=0; DepthConstant=0; MaxDepthSoluteAccessible=0; RunoffEffectivenessAtMovingSolute=0; MaxEffectiveRunoff=0
        Solute NH4: Thickness=[100, 100, 100, 295, 297, 298, 300, 301, 303, 304]; InitialValues=[5, 1, 0.5, 0.5, 0.5, 0.5, 0.5, 0.5, 0.046, 0.046]; InitialValuesUnits=ppm; WaterTableConcentration=0; D0=0; DepthConstant=0; MaxDepthSoluteAccessible=0; RunoffEffectivenessAtMovingSolute=0; MaxEffectiveRunoff=0
        Solute Urea: Thickness=[100, 100, 100, 295, 297, 298, 300, 301, 303, 304]; InitialValues=[0, 0, 0, 0, 0, 0, 0, 0, 0, 0]; InitialValuesUnits=kg/ha; WaterTableConcentration=0; D0=0; DepthConstant=0; MaxDepthSoluteAccessible=0; RunoffEffectivenessAtMovingSolute=0; MaxEffectiveRunoff=0
        SoilTemperature Temperature: InteractionsPerDay=8
  Folder Replacements
    Plant Maize
      Cultivar e_Maize_B_110
        Command:
          [Phenology].Juvenile.Target.FixedValue = 210
          [Phenology].Photosensitive.Target.XYPairs.X = 0, 12.5, 24
          [Phenology].Photosensitive.Target.XYPairs.Y = 0, 0, 0
          [Phenology].FlagLeafToFlowering.Target.FixedValue = 1
          [Phenology].FloweringToGrainFilling.Target.FixedValue = 170
          [Phenology].GrainFilling.Target.FixedValue = 730
          [Phenology].Maturing.Target.FixedValue = 1
          [Phenology].MaturityToHarvestRipe.Target.FixedValue = 100
          [Cob].DMDemands.Structural.DMDemandFunction.MaximumOrganWt.FixedValue = 36
          [Maize].Phenology.Emerging.Target.ShootLag.FixedValue=50.5789819220081
          [Maize].Phenology.Juvenile.Target.FixedValue=205.1154889166355
          [Maize].Phenology.FlagLeafToFlowering.Target.FixedValue=49.82851054519415
          [Maize].Phenology.FloweringToGrainFilling.Target.FixedValue=109.87419605255127
          [Maize].Phenology.GrainFilling.Target.FixedValue=670.1936458237469
          [Maize].Phenology.Maturing.Target.FixedValue=13.068949710577726
          [Maize].Phenology.MaturityToHarvestRipe.Target.FixedValue=8.426669863983989
          [Maize].Leaf.Photosynthesis.RUE.FixedValue=2.5107645504176617
    Plant Wheat
      Cultivar Yecora
        Command:
          [Phenology].Phyllochron.BasePhyllochron.FixedValue = 90
          [Leaf].CohortParameters.MaxArea.AreaLargestLeaves.FixedValue = 4000
          [Phenology].CAMP.FLNparams.MinLN = 7
          [Phenology].CAMP.FLNparams.PpLN = 2
          [Phenology].CAMP.FLNparams.VrnLN = 2
          [Phenology].CAMP.FLNparams.VxPLN = 2
          [Phenology].HeadEmergenceLongDayBase.FixedValue = 110
          [Phenology].HeadEmergencePpSensitivity.FixedValue = 0
          [Phenology].CAMP.EnvData.VrnTreatTemp = 6
          [Phenology].CAMP.EnvData.VrnTreatDuration = 60
      Cultivar YecoraEdit
        Command:
          [Phenology].Phyllochron.BasePhyllochron.FixedValue = 90
          [Leaf].CohortParameters.MaxArea.AreaLargestLeaves.FixedValue = 4000
          [Phenology].CAMP.FLNparams.MinLN = 7
          [Phenology].CAMP.FLNparams.PpLN = 2
          [Phenology].CAMP.FLNparams.VrnLN = 2
          [Phenology].CAMP.FLNparams.VxPLN = 2
          [Phenology].HeadEmergenceLongDayBase.FixedValue = 110
          [Phenology].HeadEmergencePpSensitivity.FixedValue = 0
          [Phenology].CAMP.EnvData.VrnTreatTemp = 6
          [Phenology].CAMP.EnvData.VrnTreatDuration = 60
          [Wheat].Leaf.Photosynthesis.RUE.FixedValue =0.45
          [Phenology].ThermalTime.Response.X = 0, 18, 30
      Cultivar Yecora___edited
        Command:
          [Phenology].Phyllochron.BasePhyllochron.FixedValue=75
          [Leaf].CohortParameters.MaxArea.AreaLargestLeaves.FixedValue=4000
          [Phenology].CAMP.FLNparams.MinLN=7
          [Phenology].CAMP.FLNparams.PpLN=2
          [Phenology].CAMP.FLNparams.VrnLN=2
          [Phenology].CAMP.FLNparams.VxPLN=2
          [Phenology].HeadEmergenceLongDayBase.FixedValue=110
          [Phenology].HeadEmergencePpSensitivity.FixedValue=0
          [Phenology].CAMP.EnvData.VrnTreatTemp=6
          [Phenology].CAMP.EnvData.VrnTreatDuration=60
          [Wheat].Leaf.Photosynthesis.RUE.FixedValue=1.24
          [Wheat].Leaf.ExtinctionCoeff.VegetativePhase.FixedValue =0.45
          [Phenology].ThermalTime.Response.X = 0, 18, 30
          [Phenology].ThermalTime.Response.Y = 0, 18, 0
          [Phenology].Phyllochron.BasePhyllochron.FixedValue =75
    Plant Soybean
    Cultivar Rex
      Command:
        [Grain].NumberFunction.GrainNumber.GrainsPerGramOfStem.FixedValue = 18
        [Grain].MaximumNConc.FixedValue = 0.02
        [Phenology].CAMP.FLNparams.MinLN = 7
        [Phenology].CAMP.FLNparams.PpLN = 4.0
        [Phenology].CAMP.FLNparams.VrnLN = 6
        [Phenology].CAMP.FLNparams.VxPLN = 0.0
  DataStore
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